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f(x) := 3*x - x^3
f'(x) := d/dx(f(x)) → -(3*x^2) + 3
f''(x) := d^2/dx^2(f(x)) → -(6*x)
f'''(x) := d^3/dx^3(f(x)) → -6
p(x) := f(0) + f'(0)/1*x + f''(0)/2*x^2 + f'''(0)/(2*3)*x^3 → -x^3 + 3*x
p_0(x) := f(0) → 0  # Первое приближение
p_1(x) := f(0) + f'(0)/1*x → 3*x  # Второе
p_2(x) := f(0) + f'(0)/1*x + f''(0)/2*x^2 → 3*x  # Третье
# [plot: f(x), p_0(x), p_1(x), p_2(x), p(x) vs x]
|f(0.3) - p_2(0.3)| → 0.027
|f(0.15) - p_2(0.15)| → 0.003375
limit(|f(x) - p_2(x)|, x → 0) → 0
