f(x) := sin(x)
f'(x) := d/dx(f(x)) → cos(x)
f'''(x) := d^3/dx^3(f(x)) → -cos(x)
f_5(x) := d^5/dx^5(f(x)) → cos(x)
f_9(x) := d^9/dx^9(f(x)) → cos(x)
f''(x) := d^2/dx^2(f(x)) → -sin(x)
f_4(x) := d^4/dx^4(f(x)) → sin(x)
f_7(x) := d^7/dx^7(f(x)) → -cos(x)
f(0) → 0
f'(0) → 1
f''(0) → 0
f'''(0) → -1
f_4(0) → 0
f_5(0) → 1
p(x) := f(0) + f'(0)/1*x + f''(0)/2*x^2 + f'''(0)/(2*3)*x^3 + f_4(0)/(2*3*4)*x^4 + f_5(0)/(2*3*4*5)*x^5 → x^5/120 + (x - x^3/6)
p_1(x) := f(0) + f'(0)/1*x → x
p_3(x) := f(0) + f'(0)/1*x + f''(0)/2*x^2 + f'''(0)/(2*3)*x^3 → -x^3/6 + x
p_5(x) := f(0) + f'(0)/1*x + f''(0)/2*x^2 + f'''(0)/(2*3)*x^3 + f_4(0)/(2*3*4)*x^4 + f_5(0)/(2*3*4*5)*x^5 → x^5/120 + (x - x^3/6)
p_7(x) := f(0) + f'(0)/1*x + f''(0)/2*x^2 + f'''(0)/(2*3)*x^3 + f_4(0)/(2*3*4)*x^4 + f_5(0)/(2*3*4*5)*x^5 + f_7(0)/(2*3*4*5*6*7)*x^7 → -x^7/5040 + x^5/120 + (x - x^3/6)
p_9(x) := f(0) + f'(0)/1*x + f''(0)/2*x^2 + f'''(0)/(2*3)*x^3 + f_4(0)/(2*3*4)*x^4 + f_5(0)/(2*3*4*5)*x^5 + f_7(0)/(2*3*4*5*6*7)*x^7 + f_9(0)/(2*3*4*5*6*7*8*9)*x^9 → x^9/362880 + (x^5/120 + (x - x^3/6) - x^7/5040)
# [plot: f(x), p_1(x), p_3(x), p_5(x), p_7(x), p_9(x) vs x]
dp_3_1(x) := d/dx(p_3(x)) → -x^2/2 + 1
dp_5_1(x) := d/dx(p_5(x)) → x^4/24 + (1 - x^2/2)
dp_5_4(x) := d^4/dx^4(p_5(x)) → x
dp_3_2(x) := d^2/dx^2(p_3(x)) → -x
dp_5_2(x) := d^2/dx^2(p_5(x)) → x^3/6 - x
dp_5_5(x) := d^5/dx^5(p_5(x)) → 1
dp_3_3(x) := d^3/dx^3(p_3(x)) → -1
dp_5_3(x) := d^3/dx^3(p_5(x)) → x^2/2 - 1
# [plot: p_3(x), dp_3_1(x), dp_3_2(x), dp_3_3(x) vs x]
# [plot: p_5(x), dp_5_1(x), dp_5_2(x), dp_5_3(x), dp_5_4(x), dp_5_5(x) vs x]
