f(x) := sin(x)
f(0) → 0
f'(x) := d/dx(f(x)) → cos(x)
f_5(x) := d^5/dx^5(f(x)) → cos(x)
f_9(x) := d^9/dx^9(f(x)) → cos(x)
f''(x) := d^2/dx^2(f(x)) → -sin(x)
f_6(x) := d^6/dx^6(f(x)) → -sin(x)
f_10(x) := d^10/dx^10(f(x)) → -sin(x)
f'''(x) := d^3/dx^3(f(x)) → -cos(x)
f_7(x) := d^7/dx^7(f(x)) → -cos(x)
f_11(x) := d^11/dx^11(f(x)) → -cos(x)
f_4(x) := d^4/dx^4(f(x)) → sin(x)
f_8(x) := d^8/dx^8(f(x)) → sin(x)
f'(0) → 1
f''(0) → 0
f'''(0) → -1
f_4(0) → 0
p(x) := f(0) + f'(0)/1*x + f''(0)/2*x^2 + f'''(0)/(2*3)*x^3 + f_4(0)/(2*3*4)*x^4 + f_5(0)/(2*3*4*5)*x^5 → x^5/120 + (x - x^3/6)
p_1(x) := f(0) + f'(0)/1*x → x
p_3(x) := f(0) + f'(0)/1*x + f''(0)/2*x^2 + f'''(0)/(2*3)*x^3 → -x^3/6 + x
p_5(x) := f(0) + f'(0)/1*x + f''(0)/2*x^2 + f'''(0)/(2*3)*x^3 + f_4(0)/(2*3*4)*x^4 + f_5(0)/(2*3*4*5)*x^5 → x^5/120 + (x - x^3/6)
p_7(x) := f(0) + f'(0)/1*x + f''(0)/2*x^2 + f'''(0)/(2*3)*x^3 + f_4(0)/(2*3*4)*x^4 + f_5(0)/(2*3*4*5)*x^5 + f_6(0)/(2*3*4*5*6)*x^6 + f_7(0)/(2*3*4*5*6*7)*x^7 → -x^7/5040 + x^5/120 + (x - x^3/6)
p_9(x) := f(0) + f'(0)/1*x + f''(0)/2*x^2 + f'''(0)/(2*3)*x^3 + f_4(0)/(2*3*4)*x^4 + f_5(0)/(2*3*4*5)*x^5 + f_6(0)/(2*3*4*5*6)*x^6 + f_7(0)/(2*3*4*5*6*7)*x^7 + f_8(0)/(2*3*4*5*6*7*8)*x^8 + f_9(0)/(2*3*4*5*6*7*8*9)*x^9 → x^9/362880 + (x^5/120 + (x - x^3/6) - x^7/5040)
p_11(x) := f(0) + f'(0)/1*x + f''(0)/2*x^2 + f'''(0)/(2*3)*x^3 + f_4(0)/(2*3*4)*x^4 + f_5(0)/(2*3*4*5)*x^5 + f_6(0)/(2*3*4*5*6)*x^6 + f_7(0)/(2*3*4*5*6*7)*x^7 + f_8(0)/(2*3*4*5*6*7*8)*x^8 + f_9(0)/(2*3*4*5*6*7*8*9)*x^9 + f_10(0)/(2*3*4*5*6*7*8*9*10)*x^10 + f_11(0)/(2*3*4*5*6*7*8*9*10*11)*x^11 → -x^11/39916800 + x^9/362880 + (x^5/120 + (x - x^3/6) - x^7/5040)
# [plot: f(x), p_1(x), p_3(x), p_5(x), p_7(x), p_9(x), p_11(x) vs x]
p_7'(x) := d/dx(p_7(x)) → -x^6/720 + x^4/24 + (1 - x^2/2)
p_7_5(x) := d^5/dx^5(p_7(x)) → -x^2/2 + 1
p_3'(x) := d/dx(p_3(x)) → -x^2/2 + 1
p_5'(x) := d/dx(p_5(x)) → x^4/24 + (1 - x^2/2)
p_5_4(x) := d^4/dx^4(p_5(x)) → x
p_7''(x) := d^2/dx^2(p_7(x)) → -x^5/120 + (x^3/6 - x)
p_7_6(x) := d^6/dx^6(p_7(x)) → -x
p_3''(x) := d^2/dx^2(p_3(x)) → -x
p_5''(x) := d^2/dx^2(p_5(x)) → x^3/6 - x
p_5_5(x) := d^5/dx^5(p_5(x)) → 1
p_7'''(x) := d^3/dx^3(p_7(x)) → -x^4/24 + (x^2/2 - 1)
p_7_7(x) := d^7/dx^7(p_7(x)) → -1
p_3'''(x) := d^3/dx^3(p_3(x)) → -1
p_5'''(x) := d^3/dx^3(p_5(x)) → x^2/2 - 1
# [plot: p_3(x), p_3'(x), p_3''(x), p_3'''(x) vs x]
# [plot: p_5(x), p_5'(x), p_5''(x), p_5'''(x), p_5_4(x), p_5_5(x) vs x]
p_7_4(x) := d^4/dx^4(p_7(x)) → -x^3/6 + x
# [plot: p_7(x), p_7'(x), p_7''(x), p_7'''(x), p_7_4(x), p_7_5(x), p_7_6(x), p_7_7(x) vs x]
# Сравнение истинных производных с производными полинома
# [plot: p_7'(x), f'(x) vs x]
# [plot: p_7''(x), f''(x) vs x]
# [plot: p_7'''(x), f'''(x) vs x]
# [plot: p_7_4(x), f_4(x) vs x]
# [plot: p_7_5(x), f_5(x) vs x]
# [plot: p_7_6(x), f_6(x) vs x]
# [plot: p_7_7(x), f_7(x) vs x]
# Для аппроксимации выберем полином 7-й степени
# [plot: f(x), p_7(x) vs x]
f(π/2) → 1
|f(π/2) - p_7(π/2)| float → 0.000156898600501
p_7(π/2) float → 0.999843101399
p_7(π) float → -0.0752206159036
f(π) → 0
clamp_2pi(x) := mod(x, 2*π)
reduction(x) :=
    if (x ≤ π/2) and (x ≥ -π/2)
        x
    else if (|x| > π/2) and (|x| ≤ π + π/2)
        if x ≥ 0
            π/2 - (x - π/2)
        else
            -(π/2 - (|x| - π/2))
    else if (|x| > π + π/2) and (|x| ≤ 2*π)
        if x ≥ 0
            x - 2*π
        else
            -(|x| - 2*π)
# [plot: reduction(x) vs x]
sin_approx(x) := p_7(reduction(clamp_2pi(x)))
# [plot: sin_approx(x), sin(x) - sin_approx(x) vs x]
cos_approx(x) := sin_approx(x + π/2)
# [plot: cos_approx(x), cos(x) - cos_approx(x) vs x]
