f(x) := 3*x - x^3
f'(x) := 3 - 3*x^2
g(x, h) := 3*x + 3*h - x^3 - 3*x^2*h - 3*x*h^2 - h^3
f(5 + 7) → -1692
g(5, 7) → -1692
x := 5
t(h) := 3*x + 3*h - x^3 - 3*x^2*h - 3*x*h^2 - h^3
t'(h) := d/dh(t(h)) → -(3*h^2) - 30*h - 72
t'(0) → -72
f'(x) → -72
