f(x) := 3*x - x^3
h := 10^-3
f'(x) := (f(x + h) - f(x))/h
f''(x) := (f'(x + h) - f'(x))/h
f'''(x) := (f''(x + h) - f''(x))/h
# [plot: f(x) vs x]
# [plot: f'(x) vs x]
# [plot: f''(x) vs x]
# [plot: f'''(x) vs x]
g(x) := f(0) + f'(0)*x + f''(0)/2!*x^2 + f'''(0)/3!*x^3
f(10) → -970
g(10) float → -970.30001
