f(x) := sin(x)
# [plot: f(x) vs x]
f'(x) := d/dx(f(x)) → cos(x)
f_5(x) := d^5/dx^5(f(x)) → cos(x)
f_9(x) := d^9/dx^9(f(x)) → cos(x)
f''(x) := d^2/dx^2(f(x)) → -sin(x)
f_6(x) := d^6/dx^6(f(x)) → -sin(x)
f'''(x) := d^3/dx^3(f(x)) → -cos(x)
f_7(x) := d^7/dx^7(f(x)) → -cos(x)
f_4(x) := d^4/dx^4(f(x)) → sin(x)
f_8(x) := d^8/dx^8(f(x)) → sin(x)
f'(0) → 1
f''(0) → 0
f'''(0) → -1
f_4(0) → 0
# Численный анализ производных (для большей точности можно взять центрированное значение: g'(x)=[f(x+h)-f(x-h)]/2h.
h := 10^-3 float → 0.001
g'(x) := (f(x + h) - f(x))/h
|g'(0) - f'(0)| → 0.166666658333*10^-6
f'(x) → cos(x)
# [plot: g'(x) vs x]
g''(x) := (g'(x + h) - g'(x))/h
|g''(0) - f''(0)| → 0.00099999975
f''(x) → -sin(x)
# [plot: g''(x) vs x]
g'''(x) := (g''(x + h) - g''(x))/h
|g'''(0) - f'''(0)| → 1.24999971e-6
f'''(x) → -cos(x)
# [plot: g'''(x) vs x]
g_4(x) := (g'''(x + h) - g'''(x))/h
|g_4(0) - f_4(0)| → 0.00199999812
f_4(x) → sin(x)
# [plot: g_4(x) vs x]
