a := 17
f(x) := x^2 - a
f'(x) := d/dx(f(x)) → 2*x
# [plot: f(x) vs x]
# [plot: f'(x) vs x]
guess_1 := a
f'(guess_1) → 34
guess_2 := guess_1 - f(guess_1)*1/f'(guess_1) → 9
guess_3 := guess_2 - f(guess_2)*1/f'(guess_2) float → 5.44444444444
guess_4 := guess_3 - f(guess_3)*1/f'(guess_3) float → 4.28344671202
guess_5 := guess_4 - f(guess_4)*1/f'(guess_4) float → 4.12610662758
guess_6 := guess_5 - f(guess_5)*1/f'(guess_5) float → 4.12310671696
guess_7 := guess_6 - f(guess_6)*1/f'(guess_6) float → 4.12310562562
slope_1(x) := f'(guess_1)*x - (f'(guess_1)*guess_1 - f(guess_1))
slope_2(x) := f'(guess_2)*x - (f'(guess_2)*guess_2 - f(guess_2))
slope_3(x) := f'(guess_3)*x - (f'(guess_3)*guess_3 - f(guess_3))
slope_4(x) := f'(guess_4)*x - (f'(guess_4)*guess_4 - f(guess_4))
slope_5(x) := f'(guess_5)*x - (f'(guess_5)*guess_5 - f(guess_5))
slope_6(x) := f'(guess_6)*x - (f'(guess_6)*guess_6 - f(guess_6))
slope_7(x) := f'(guess_7)*x - (f'(guess_7)*guess_7 - f(guess_7))
# [plot: f(x), slope_1(x) vs x]
# [plot: f(x), slope_2(x) vs x]
# [plot: f(x), slope_3(x) vs x]
# [plot: f(x), slope_4(x) vs x]
# [plot: f(x), slope_5(x) vs x]
# [plot: f(x), slope_6(x) vs x]
# [plot: f(x), slope_7(x) vs x]
# [plot: f(x), slope_1(x), slope_2(x), slope_3(x), slope_4(x), slope_5(x), slope_6(x), slope_7(x) vs x]
